*Heading
** Job name: Job-14 Model name: Model-3
** Generated by: Abaqus/CAE 6.14-1
*Preprint, echo=NO, model=NO, history=NO, contact=NO
**
** PARTS
**
*Part, name=Part-1
*Node
      1, 0.0161017552, 0.0345303267,           0.
      2, -0.00986100547, 0.0368017741,           0.
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*Element, type=C3D8R
   1,   75,   63,   52,   82,   24,   12,    1,   31
   2,   64,   82,   52,   76,   13,   31,    1,   25
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*Nset, nset=Set-1, generate
    1,  5559,     1
*Elset, elset=Set-1, generate
    1,  3348,     1
** Section: Section-1
*Solid Section, elset=Set-1, material=Material-1
,
*End Part
**
**
** ASSEMBLY
**
*Assembly, name=Assembly
**
*Instance, name=Part-1-1, part=Part-1
*End Instance
**
*Node
      1,           0.,  2.72177742e-18,           0.
*Node
      2,           0.,  -2.72177742e-18,   1.39999998
*Node
      3, -0.200000003,           0.,           0.
*Node
      4, -0.200000003,           0.,   1.39999998
*Nset, nset=Set-9
 4,
*Nset, nset=Set-10
 3,
*Nset, nset=Set-11
 2,
*Nset, nset=Set-12
 1,
*Nset, nset=m_Set-1
 2,
*Nset, nset=m_Set-3
 1,
*Nset, nset=s_Set-1, instance=Part-1-1, generate
 5509,  5559,     1
*Elset, elset=s_Set-1, instance=Part-1-1, generate
 3318,  3348,     1
*Nset, nset=s_Set-3, instance=Part-1-1, generate
  1,  51,   1
*Elset, elset=s_Set-3, instance=Part-1-1, generate
  1,  31,   1
*Surface, type=NODE, name=s_Set-1_CNS_, internal
s_Set-1, 1.
*Surface, type=NODE, name=s_Set-3_CNS_, internal
s_Set-3, 1.
** Constraint: Constraint-1
*MPC
LINK, s_Set-1, m_Set-1
** Constraint: Constraint-2
*MPC
LINK, s_Set-3, m_Set-3
*Spring, elset=Springs/Dashpots-1-spring

3.
*Element, type=SpringA, elset=Springs/Dashpots-1-spring
1, 1, 3
*Spring, elset=Springs/Dashpots-2-spring

3.
*Element, type=SpringA, elset=Springs/Dashpots-2-spring
2, 2, 4
*End Assembly
**
** MATERIALS
**
*Material, name=Material-1
*Density
1163.,
*Elastic
 3.2e+09, 0.3
** ----------------------------------------------------------------
**
** STEP: Step-1
**
*Step, name=Step-1, nlgeom=NO, perturbation
*Frequency, eigensolver=Lanczos, acoustic coupling=on, normalization=displacement
10, , , , ,
**
** BOUNDARY CONDITIONS
**
** Name: BC-1 Type: Symmetry/Antisymmetry/Encastre
*Boundary
Set-9, ENCASTRE
** Name: BC-2 Type: Symmetry/Antisymmetry/Encastre
*Boundary
Set-10, ENCASTRE
** Name: BC-3 Type: Displacement/Rotation
*Boundary
Set-11, 2, 2
Set-11, 4, 4
Set-11, 5, 5
Set-11, 6, 6
** Name: BC-4 Type: Displacement/Rotation
*Boundary
Set-12, 2, 2
Set-12, 4, 4
Set-12, 5, 5
Set-12, 6, 6
**
** OUTPUT REQUESTS
**
*Restart, write, frequency=0
**
** FIELD OUTPUT: F-Output-1
**
*Output, field, variable=PRESELECT
*End Step
